**
**   Structure: gas network.
**   Test objective: orifice element, branch.
**
*NODE,NSET=NALL
1, 0, 0, 0
2, 1, 0, 0
3, 2, 1, 0
4, 3, 2, 0
5, 4, 2, 0
6, 2, -1, 0
7, 3, -2, 0
8, 4, -2, 0
9, 5,  2, 0
10,6,  2, 0
*ELEMENT, TYPE=D,ELSET=EGAS
1, 0, 1, 2
2, 2, 3, 4
3, 4, 5, 9
4, 2, 6, 7
5, 7, 8, 0
6, 9,10, 0
*MATERIAL,NAME=GAS
*FLUID CONSTANTS
1.002353938E9
*SPECIFIC GAS CONSTANT
287.E6
*FLUID SECTION,ELSET=EGAS,TYPE=ORIFICE,MATERIAL=GAS
78.5,10,10
*INITIAL CONDITIONS,TYPE=TEMPERATURE
2,500
*INITIAL CONDITIONS,TYPE=TOTAL PRESSURE
4,0.06
*STEP,INC=100
*HEAT TRANSFER,STEADY STATE
1.,1.
*BOUNDARY,
2,0,0,500
7,0,0,500
9,0,0,500
2,2,2,0.1
9,2,2,0.02
7,2,2,0.08
*NODE PRINT,NSET=NALL
U,NT
*END STEP
