**
**   Structure: channel connecting two reservoirs.
**   Test objective: inflexion - White-Coolebrook
**                   length calculated from coordinates
**                   example from Chanson, p 283
**
*NODE, NSET=Nall
       1,1.999000000000e+02,2.443947000000e-03,0.000000000000e+00
       2,2.000000000000e+02,0.000000000000e+00,0.000000000000e+00
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*ELEMENT, TYPE=D, ELSET=Eall
     1,      1,      3,      2
     2,      4,      6,      5
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*MATERIAL,NAME=WATER
*DENSITY
1000.
*FLUID CONSTANTS
4217.,1750.E-6,273.
*ELSET,ELSET=E1
14,15
*ELSET,ELSET=E2
13
*ELSET,ELSET=E3
12
*ELSET,ELSET=E4
2,3,4,5,6,7,8,9,10,11
*ELSET,ELSET=E5
1
*FLUID SECTION,ELSET=E1,TYPE=CHANNEL INOUT,MATERIAL=WATER
*FLUID SECTION,ELSET=E2,TYPE=CHANNEL SLUICE GATE,MATERIAL=WATER
3.5,0.02443,10.,,12
*FLUID SECTION,ELSET=E3,TYPE=CHANNEL SLUICE OPENING,MATERIAL=WATER
3.5,0.02443,-1.,0.,2.e-3,13
*FLUID SECTION,ELSET=E4,TYPE=CHANNEL STRAIGHT,MATERIAL=WATER
3.5,0.02443,-1.,0.,2.e-3,13
*FLUID SECTION,ELSET=E5,TYPE=CHANNEL RESERVOIR,MATERIAL=WATER
3.5,0.02443,-1.,0.,2.e-3,13
*BOUNDARY
2,2,2,0.001
*BOUNDARY,MASS FLOW
29,1,1,5000.
*STEP
*HEAT TRANSFER,STEADY STATE
*DLOAD
Eall,GRAV,9.81,0.,0.,-1.
*NODE PRINT,NSET=NALL
U
*END STEP
