**
**   Structure: 2d Couette incompressible fluid flow
**   Test objective: CFD Finite Volume Method
**                   mean entrance velocity 0.5
**		     moving wall: velocity 1. and temperature 0.
**                   fixed wall: velocity 0 and adiabatic
**                   pressure at exit 1.
**   Analytical solution: v linear between 0. and 1.
**                        Tmax=0.5
**                        p constant at 1.
**
*NODE, NSET=Nall
       1,0.000000000000e+00,0.000000000000e+00,1.000000000000e-01
       2,0.000000000000e+00,1.000000000000e-01,1.000000000000e-01
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*ELEMENT, TYPE=F3D8, ELSET=Eall
     1,     1,     2,     3,     4,     5,     6,     7,     8
     2,     4,     3,     9,    10,     8,     7,    11,    12
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*SURFACE, NAME=SOLIDSURFACE
1, S6
2, S6
3, S6
4, S6
5, S6
6, S6
7, S6
8, S6
9, S6
10, S6
91, S4
92, S4
93, S4
94, S4
95, S4
96, S4
97, S4
98, S4
99, S4
100, S4
*MATERIAL,NAME=WATER
*DENSITY
1.
*FLUID CONSTANTS
1.,1.
*CONDUCTIVITY
1.
*SOLID SECTION,ELSET=Eall,MATERIAL=WATER
*INITIAL CONDITIONS,TYPE=FLUID VELOCITY
Nall,1,1.
Nall,2,0.
Nall,3,0.
*INITIAL CONDITIONS,TYPE=PRESSURE
Nall,1.
*INITIAL CONDITIONS,TYPE=TEMPERATURE
Nall,0.
*STEP,INCF=1000
*COUPLED TEMPERATURE-DISPLACEMENT,STEADY STATE
1.,1.,,,0.01
*BOUNDARYF
91, S4, 2,, 0.000000
92, S4, 2,, 0.000000
93, S4, 2,, 0.000000
94, S4, 2,, 0.000000
95, S4, 2,, 0.000000
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100, S4, 3,, 0.000000
*BOUNDARYF
91, S4, 1,, 1.000000
92, S4, 1,, 1.000000
93, S4, 1,, 1.000000
94, S4, 1,, 1.000000
95, S4, 1,, 1.000000
96, S4, 1,, 1.000000
97, S4, 1,, 1.000000
98, S4, 1,, 1.000000
99, S4, 1,, 1.000000
100, S4, 1,, 1.000000
10, S5, 8,, 1.000000
20, S5, 8,, 1.000000
30, S5, 8,, 1.000000
40, S5, 8,, 1.000000
50, S5, 8,, 1.000000
60, S5, 8,, 1.000000
70, S5, 8,, 1.000000
80, S5, 8,, 1.000000
90, S5, 8,, 1.000000
100, S5, 8,, 1.000000
1, S3, 1,, 0.500000
11, S3, 1,, 0.500000
21, S3, 1,, 0.500000
31, S3, 1,, 0.500000
41, S3, 1,, 0.500000
51, S3, 1,, 0.500000
61, S3, 1,, 0.500000
71, S3, 1,, 0.500000
81, S3, 1,, 0.500000
91, S3, 1,, 0.500000
*DFLUX
1, S6, 0.000000e+00
2, S6, 0.000000e+00
3, S6, 0.000000e+00
4, S6, 0.000000e+00
5, S6, 0.000000e+00
6, S6, 0.000000e+00
7, S6, 0.000000e+00
8, S6, 0.000000e+00
9, S6, 0.000000e+00
10, S6, 0.000000e+00
*NODE PRINT,FREQUENCYF=1000,NSET=Nall
VF,PSF,TSF
*EL PRINT,ELSET=Eall
SVF,HFLF
*END STEP
