**
**   Structure: fluid flow between two plates.
**   Test objective: stationary incompressible Couette
**                   with fixed wall temperature.
**                   velocity:linear between 0. and 1.
**                   temperature: maximum of 1.125
**
*NODE, NSET=Nall
       1,1.000000000000e-01,1.000000000000e+00,0.000000000000e+00
       2,1.000000000000e-01,9.500000000000e-01,0.000000000000e+00
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*ELEMENT, TYPE=F3D8, ELSET=Eall
     1,     1,     2,     3,     4,     5,     6,     7,     8
     2,     2,     9,    10,     3,     6,    11,    12,     7
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*EQUATIONF
2
1,S2,1,1.,1,S1,1,-1.
2
2,S2,1,1.,2,S1,1,-1.
2
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20,S2,0,1.,20,S1,0,-1.
*SURFACE,NAME=SOLIDSURFACE
1,S6
20,S4
*ELSET,ELSET=E1
1,2,3,4,5,6
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*MATERIAL,NAME=WATER
*DENSITY
1.
*FLUID CONSTANTS
1.,1.
*CONDUCTIVITY
1.
*SOLID SECTION,ELSET=Eall,MATERIAL=WATER
*INITIAL CONDITIONS,TYPE=PRESSURE
Nall,1.
*INITIAL CONDITIONS,TYPE=TEMPERATURE
Nall,1.
*INITIAL CONDITIONS,TYPE=FLUID VELOCITY
Nall,1,0.
Nall,2,0.
Nall,3,0.
*STEP,INCF=1000
*COUPLED TEMPERATURE-DISPLACEMENT,STEADY STATE
1.,1.,,,0.01
*BOUNDARYF
1,S6,1,1,1.
1,S6,2,3,0.
1,S6,11,11,1.
20,S4,1,3,0.
20,s4,11,11,1.
E1,S3,3,3,0.
E1,S5,3,3,0.
*NODE PRINT,FREQUENCYF=1000,NSET=Nall
VF,PSF,TSF
*END STEP
