**
**   Structure: 2d Couette incompressible concentric fluid flow
**   Test objective: CFD Finite Volume Method
**                   inner wall: tangential velocity 2, temperature 1.
**                   outer wall: tangential velocity 1, temperature 1.
**                   viscous stress and heat flux output in a
**                   local cylindrical system
**   Analytical solution: v proportional to 1/r
**                        T (r=0.75) = 1.467
**                        p difference inner/outer wall = 1.5
**
*NODE, NSET=Nall
       1,-1.000000000000e+00,0.000000000000e+00,0.000000000000e+00
       2,-9.807852804032e-01,1.950903220161e-01,0.000000000000e+00
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*ELEMENT, TYPE=F3D8, ELSET=Eall
     1,     1,     2,     3,     4,     5,     6,     7,     8
     2,     5,     6,     7,     8,     9,    10,    11,    12
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*SURFACE, NAME=SOLIDSURFACE
1, S1
61, S1
5, S1
4, S2
64, S2
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124, S2
*TRANSFORMF,TYPE=C,SURFACE=SOLIDSURFACE
0.,0.,0.,0.,0.,1.
*MATERIAL,NAME=WATER
*DENSITY
1.
*FLUID CONSTANTS
1.,1.
*CONDUCTIVITY
1.
*ORIENTATION,NAME=OR1,SYSTEM=CYLINDRICAL
0.,0.,0.,0.,0.,1.
*SOLID SECTION,ELSET=Eall,MATERIAL=WATER,ORIENTATION=OR1
*INITIAL CONDITIONS,TYPE=PRESSURE
Nall,1.
*INITIAL CONDITIONS,TYPE=FLUID VELOCITY
Nall,1,0.
Nall,2,0.
Nall,3,0.
*INITIAL CONDITIONS,TYPE=TEMPERATURE
Nall,1.
*STEP,INCF=100
*COUPLED TEMPERATURE-DISPLACEMENT,STEADY STATE
1.,1.,,,0.01
*BOUNDARYF
4, S2, 1,, 0.000000
64, S2, 1,, 0.000000
8, S2, 1,, 0.000000
12, S2, 1,, 0.000000
16, S2, 1,, 0.000000
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124, S5, 3,, 0.000000
*NODE PRINT,FREQUENCYF=100,NSET=Nall
VF,PSF,TSF
*EL PRINT,FREQUENCYF=100,ELSET=Eall
SVF,HFLF
*END STEP
