**
**   Structure: 2d Couette incompressible concentric fluid flow
**              in a rotating coordinate system
**   Test objective: CFD Finite Volume Method
**                   inner wall: tangential velocity 0, temperature 1.
**                   outer wall: tangential velocity -3, temperature 1.
**                   centrifugal speed: 4 rad/s
**                   should give the same pressure and temperature
**                   distribution as example couettecyl
**   Analytical solution: v proportional to 1/r
**                        T (r=0.75) = 1.467
**                        p difference inner/outer wall = 1.5
**
*NODE, NSET=Nall
       1,-1.000000000000e+00,0.000000000000e+00,0.000000000000e+00
       2,-9.807852804032e-01,1.950903220161e-01,0.000000000000e+00
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*ELEMENT, TYPE=F3D8, ELSET=Eall
     1,     1,     2,     3,     4,     5,     6,     7,     8
     2,     5,     6,     7,     8,     9,    10,    11,    12
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** Surfaces based on solidsurface
*SURFACE, NAME=SOLIDSURFACE
1, S1
61, S1
5, S1
4, S2
64, S2
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124, S2
*TRANSFORMF,TYPE=C,SURFACE=SOLIDSURFACE
0.,0.,0.,0.,0.,1.
*MATERIAL,NAME=WATER
*DENSITY
1.
*FLUID CONSTANTS
1.,1.
*CONDUCTIVITY
1.
*SOLID SECTION,ELSET=Eall,MATERIAL=WATER
*INITIAL CONDITIONS,TYPE=PRESSURE
Nall,1.
*INITIAL CONDITIONS,TYPE=FLUID VELOCITY
Nall,1,0.
Nall,2,0.
Nall,3,0.
*INITIAL CONDITIONS,TYPE=TEMPERATURE
Nall,1.
*STEP,INCF=100
*COUPLED TEMPERATURE-DISPLACEMENT,STEADY STATE
1.,1.,,,0.01
*DLOAD
Eall,CENTRIF,16.,0.,0.,0.,0.,0.,1.
*BOUNDARYF
** BOUNDARYF based on in
4, S2, 1,, 0.000000
64, S2, 1,, 0.000000
8, S2, 1,, 0.000000
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124, S2, 1,, 0.000000
** BOUNDARYF based on in
4, S2, 2,, 0.
64, S2, 2,, 0.
8, S2, 2,, 0.
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124, S2, 2,, 0.
** BOUNDARYF based on in
4, S2, 3,, 0.000000
64, S2, 3,, 0.000000
8, S2, 3,, 0.000000
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124, S2, 3,, 0.000000
** BOUNDARYF based on out
1, S1, 1,, 0.000000
61, S1, 1,, 0.000000
5, S1, 1,, 0.000000
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121, S1, 1,, 0.000000
** BOUNDARYF based on out
1, S1, 2,, -3.
61, S1, 2,, -3.
5, S1, 2,, -3.
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121, S1, 2,, -3.
** BOUNDARYF based on out
1, S1, 3,, 0.000000
61, S1, 3,, 0.000000
5, S1, 3,, 0.000000
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121, S1, 3,, 0.000000
** BOUNDARYF based on in
4, S2, 11,, 1.000000
64, S2, 11,, 1.000000
8, S2, 11,, 1.000000
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124, S2, 11,, 1.000000
** BOUNDARYF based on out
1, S1, 11,, 1.000000
61, S1, 11,, 1.000000
5, S1, 11,, 1.000000
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121, S1, 11,, 1.000000
** BOUNDARYF based on fixz
1, S3, 3,, 0.000000
61, S3, 3,, 0.000000
5, S3, 3,, 0.000000
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124, S5, 3,, 0.000000
*NODE PRINT,FREQUENCYF=100,NSET=Nall
VF,PSF,TSF
*END STEP
