**
**   Structure: gas network.
**   Test objective: orifice element, flux given.
**
*NODE,NSET=NALL
1, 1, 0, 0
2, 2, 0, 0
3, 3, 0, 0
4, 4, 0, 0
5, 5, 0, 0
6, 6, 0, 0
7, 7, 0, 0
*ELEMENT, TYPE=D,ELSET=EGAS
1, 0, 1, 2
2, 2, 3, 4
3, 4, 5, 6
4, 6, 7, 0
*MATERIAL,NAME=GAS
*FLUID CONSTANTS
1002353.938E3
*SPECIFIC GAS CONSTANT
287.E6
*FLUID SECTION,ELSET=EGAS,TYPE=ORIFICE,MATERIAL=GAS
78.5,10,10
*INITIAL CONDITIONS, TYPE=TOTAL PRESSURE
6,0.06
4,0.07
*BOUNDARY,MASS FLOW
1,1,1,0.00913295323E-3
2,0,0,500
6,0,0,500
2,2,2,0.08
*STEP,INC=100
*HEAT TRANSFER,STEADY STATE
1.,1.
*NODE PRINT,NSET=NALL
U,NT
*END STEP
