**
**   Structure: 2d Poiseuille incompressible fluid flow
**   Test objective: CFD Finite Volume Method
**                   walls at constant temperature 0
**                   mean entrance velocity 1.
**                   pressure at exit 1.
**   Analytical solution: vmax=1.5
**                        Tmax=0.75
**                        pmax=73.
**
*NODE, NSET=Nall
       1,0.000000000000e+00,0.000000000000e+00,1.000000000000e-01
       2,0.000000000000e+00,1.000000000000e-01,1.000000000000e-01
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*ELEMENT, TYPE=F3D8, ELSET=Eall
     1,     1,     2,     3,     4,     5,     6,     7,     8
     2,     4,     3,     9,    10,     8,     7,    11,    12
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*SURFACE, NAME=SOLIDSURFACE
1, S6
2, S6
3, S6
4, S6
5, S6
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200, S4
*MATERIAL,NAME=WATER
*DENSITY
1.
*FLUID CONSTANTS
1.,1.
*CONDUCTIVITY
1.
*SOLID SECTION,ELSET=Eall,MATERIAL=WATER
*INITIAL CONDITIONS,TYPE=FLUID VELOCITY
Nall,1,1.
Nall,2,0.
Nall,3,0.
*INITIAL CONDITIONS,TYPE=PRESSURE
Nall,1.
*INITIAL CONDITIONS,TYPE=TEMPERATURE
Nall,0.
*STEP,INCF=300
*COUPLED TEMPERATURE-DISPLACEMENT,STEADY STATE
1.,1.,,,0.01
*BOUNDARYF
181, S4, 2,, 0.000000
182, S4, 2,, 0.000000
183, S4, 2,, 0.000000
184, S4, 2,, 0.000000
185, S4, 2,, 0.000000
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200, S4, 3,, 0.000000
*BOUNDARYF
181, S4, 1,, 0.000000
182, S4, 1,, 0.000000
183, S4, 1,, 0.000000
184, S4, 1,, 0.000000
185, S4, 1,, 0.000000
186, S4, 1,, 0.000000
187, S4, 1,, 0.000000
188, S4, 1,, 0.000000
189, S4, 1,, 0.000000
190, S4, 1,, 0.000000
191, S4, 1,, 0.000000
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20, S6, 11,, 0.000000
*NODE PRINT,FREQUENCYF=300,NSET=Nall
VF,PSF,TSF
*EL PRINT,ELSET=Eall
SVF,HFLF
*END STEP
